*Heading
** Job name: D6-GMNA Model name: D6
** Generated by: Abaqus/CAE 2024
*Preprint, echo=NO, model=NO, history=NO, contact=NO
**
** PARTS
**
*Part, name=Part-1
*End Part
**
**
** ASSEMBLY
**
*Assembly, name=Assembly
**
*Instance, name=Part-1-1, part=Part-1
*Node
      1,           0.,  -19.8549118,           0.
      2,           0.,  -26.0156136,  -83.0899963
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*Element, type=S4R
   1,    6,    7,  287,  286
   2,    7,    8,  288,  287
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*Element, type=S3
1189,    1,    6,  286
1190,    1,  286,  313
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*Nset, nset=Set-1, generate
    1,  4929,     1
*Elset, elset=Set-1, generate
    1,  4928,     1
** Section: Section-1
*Shell Section, elset=Set-1, material="Mild steel"
1.76, 5
*End Instance
**
*Nset, nset=Bot, instance=Part-1-1
   2,   3,   4,   5,  33,  34
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*Elset, elset=E_All, instance=Part-1-1, generate
    1,  4928,     1
*Nset, nset=N_All, instance=Part-1-1, generate
    1,  4929,     1
*Nset, nset=RP, instance=Part-1-1
 1,
*Elset, elset=_Surf-1_SPOS, internal, instance=Part-1-1, generate
    1,  4928,     1
*Surface, type=ELEMENT, name=Surf-1
_Surf-1_SPOS, SPOS
*End Assembly
**
** MATERIALS
**
*Material, name="Mild steel"
*Elastic
207000., 0.28
*Plastic
 303.5,0.
**
** BOUNDARY CONDITIONS
**
** Name: BC-1 Type: Displacement/Rotation
*Boundary
Bot, 1, 1
Bot, 2, 2
Bot, 3, 3
Bot, 4, 4
Bot, 5, 5
Bot, 6, 6
** ----------------------------------------------------------------
**
** STEP: GMNA
**
*Step, name=GMNA, nlgeom=YES, inc=30
*Static, riks
0.05, 1., 1e-15, , ,
**
** LOADS
**
** Name: Load-1   Type: Pressure
*Dsload
Surf-1, P, 1.
**
** OUTPUT REQUESTS
**
*Restart, write, frequency=0
**
** FIELD OUTPUT: F-Output-1
**
*Output, field, variable=PRESELECT
**
** HISTORY OUTPUT: H-Output-1
**
*Output, history
*Node Output, nset=RP
U1, U2, U3
*End Step
